*Heading
** Job name: Helical Model name: Growth1-HalfCylinder-Helical
** Generated by: Abaqus/CAE 2016
*Preprint, echo=NO, model=NO, history=NO, contact=NO
**
** PARTS
**
*Part, name=Plate
*Node
      1,           4.,           0.,           2.
      2,           0.,           4.,           2.
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*Element, type=C3D8IH
   1,   558,  1987,  6862,   557,     1,    19,   268,     4
   2,  1987,  1988,  6863,  6862,    19,    20,   267,   268
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*Nset, nset=WholePlate, generate
     1,  40986,      1
*Elset, elset=WholePlate, generate
     1,  20160,      1
*Nset, nset=Bot-Mid
 1,
*Nset, nset=Top-Mid
 4,
*Nset, nset=Lat
 2,
** Section: Home
*Solid Section, elset=WholePlate, material=NeoHookean
,
*End Part
**
**
** ASSEMBLY
**
*Assembly, name=Assembly
**
*Instance, name=Plate-1, part=Plate
*End Instance
**
*End Assembly
**
** MATERIALS
**
*Material, name=NeoHookean
*Depvar
     10,
*User Material, constants=2
906512., 0.4995
** ----------------------------------------------------------------
**
** STEP: Growth
**
*Step, name=Growth, nlgeom=YES, inc=3000
*Static, stabilize, factor=0.0002, allsdtol=0, continue=NO
0.0001, 10., 1e-06, 0.2
**
** BOUNDARY CONDITIONS
**
** Name: BotMid Type: Displacement/Rotation
*Boundary
Plate-1.Bot-Mid, 1, 1
Plate-1.Bot-Mid, 2, 2
Plate-1.Bot-Mid, 3, 3
** Name: Lat Type: Displacement/Rotation
*Boundary
Plate-1.Lat, 3, 3
** Name: TopMid Type: Displacement/Rotation
*Boundary
Plate-1.Top-Mid, 2, 2
Plate-1.Top-Mid, 3, 3
**
** OUTPUT REQUESTS
**
*Restart, write, frequency=0
**
** FIELD OUTPUT: F-Output-1
**
*Output, field
*Node Output
CF, RF, U
*Element Output, directions=YES
LE, PE, PEEQ, PEMAG, S, SDV
*Contact Output
CDISP, CSTRESS
**
** HISTORY OUTPUT: H-Output-1
**
*Output, history, variable=PRESELECT
*End Step
