*Heading
** Job name: Rod Model name: Growth1-Cylinder-Rod
** Generated by: Abaqus/CAE 2016
*Preprint, echo=NO, model=NO, history=NO, contact=NO
**
** PARTS
**
*Part, name=Plate
*Node
      1,           0.,           4.,           4.
      2,           0.,   4.01000023,           4.
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*Element, type=C3D8IH
   1,  218,  268, 2561, 1385,    1,    2,   25,   72
   2, 1385, 2561, 2562, 1386,   72,   25,   26,   71
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*Nset, nset=WholePlate, generate
     1,  20200,      1
*Elset, elset=WholePlate, generate
     1,  10000,      1
*Nset, nset=Lat
 7,
*Nset, nset=Inner-ring
    1,    4,    9,   13,   49,   50
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*Elset, elset=Inner-ring
    1,    2,    3,    4,    5,    6
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*Nset, nset=Top-Mid
 10,
*Nset, nset=Bot-Mid
 9,
** Section: Home
*Solid Section, elset=WholePlate, material=NeoHookean
,
*End Part
**
**
** ASSEMBLY
**
*Assembly, name=Assembly
**
*Instance, name=Plate-1, part=Plate
*End Instance
**
*Nset, nset=MidPoint1, instance=Plate-1
 2,
*End Assembly
**
** MATERIALS
**
*Material, name=NeoHookean
*Depvar
     30,
*User Material, constants=2
906512., 0.4995
** ----------------------------------------------------------------
**
** STEP: Growth
**
*Step, name=Growth, nlgeom=YES, inc=3000
*Static, stabilize, factor=0.0002, allsdtol=0, continue=NO
0.0001, 10., 1e-06, 0.2
**
** BOUNDARY CONDITIONS
**
** Name: BC-2 Type: Displacement/Rotation
*Boundary
Plate-1.Top-Mid, 1, 1
Plate-1.Top-Mid, 2, 2
** Name: BC-3 Type: Displacement/Rotation
*Boundary
Plate-1.Bot-Mid, 1, 1
Plate-1.Bot-Mid, 2, 2
Plate-1.Bot-Mid, 3, 3
** Name: BC-5 Type: Displacement/Rotation
*Boundary
MidPoint1, 3, 3
**
** OUTPUT REQUESTS
**
*Restart, write, frequency=0
**
** FIELD OUTPUT: F-Output-1
**
*Output, field
*Node Output
CF, RF, U
*Element Output, directions=YES
LE, PE, PEEQ, PEMAG, S, SDV
*Contact Output
CDISP, CSTRESS
**
** HISTORY OUTPUT: H-Output-1
**
*Output, history, variable=PRESELECT
*End Step
